2020-11-23
오후 05:03
$PROB Mouse_liver_2comp
$INPUT ID TIME AMT DV MDV SKIP ADDL II SPECIES DOSE ROUTE FORMULATION TAD BQL WT LVW CMT RATE
$DATA  ..//Plasma_individual4_only_zero.csv IGNORE=@
$SUBROUTINE ADVAN3 TRANS4

$PK
 ;---- PK FIXED EFFECT ----
 ;Distribution
 CL = THETA(3)* EXP(ETA(1))
 V1 = THETA(4)* EXP(ETA(2))
 V2 = THETA(5)* EXP(ETA(3))
 Q  = THETA(6)* EXP(ETA(4))
 F1 = 1
 ALAG1 = 0

 IF(ROUTE.EQ.2) F1 = THETA(7) * EXP(ETA(5))
 IF(ROUTE.EQ.2) ALAG1 = THETA(9) * EXP(ETA(7))
 D1 = THETA(8)*EXP(ETA(6))

;---- PK PARAMETER RELATIONSHIP ----
 S1   = V1


$ERROR

 IPRED  = A(1)/S1
 W      = SQRT(THETA(1)**2 + THETA(2)**2 * IPRED**2)
 IRES   = DV - IPRED
 IWRES  = IRES / W
 Y      = IPRED + W * EPS(1)

$THETA
 ; Error model
 0.0001 FIX
 0.5
 (0, 200) ; (3) CL (mL/hr)
 (0, 20)  ; (4) VC (mL)
 (0, 700)  ; (5) VP (mL)
 (0, 700)  ; (6) Q (mL/hr)
 (0, 0.2) ; (7) F1
 (0, 0.1) ; (8) D1(first)
 (0, 0.1) ; (9) ALAG1

  ;        TH 1      TH 2      TH 3      TH 4      TH 5      TH 6      TH 7      TH 8

;         1.00E-04  1.38E+00  2.58E+02  2.86E+01  7.41E+02  7.04E+02  2.14E-01  1.99E-01

$OMEGA
 0 FIX
 0 FIX
 0 FIX
 0 FIX
 0 FIX
 0 FIX
 0 FIX

$SIGMA
 1 FIX

$ESTIMATION NOABORT MAXEVAL=9999 METHOD=0 PRINT=10 SIGDIGITS=3

$TABLE ID TIME AMT CMT DV MDV IPRED CWRES IWRES ROUTE DOSE ONEHEADER NOPRINT  FILE = sdtab1_2.txt

NM-TRAN MESSAGES
 WARNINGS AND ERRORS (IF ANY) FOR PROBLEM    1
 (WARNING  2) NM-TRAN INFERS THAT THE DATA ARE POPULATION.

1NONLINEAR MIXED EFFECTS MODEL PROGRAM (NONMEM) VERSION 7.4.1
 ORIGINALLY DEVELOPED BY STUART BEAL, LEWIS SHEINER, AND ALISON BOECKMANN
 CURRENT DEVELOPERS ARE ROBERT BAUER, ICON DEVELOPMENT SOLUTIONS,
 AND ALISON BOECKMANN. IMPLEMENTATION, EFFICIENCY, AND STANDARDIZATION
 PERFORMED BY NOUS INFOSYSTEMS.
 PROBLEM NO.:         1
 Mouse_liver_2comp
 TOT. NO. OF OBS RECS:      344
 TOT. NO. OF INDIVIDUALS:      204
 TWO COMPARTMENT MODEL (ADVAN3)
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 #TBLN:      1
 #METH: First Order
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
 #TERM:
0MINIMIZATION TERMINATED
 DUE TO ROUNDING ERRORS (ERROR=134)
 NO. OF FUNCTION EVALUATIONS USED:      483
 NO. OF SIG. DIGITS IN FINAL EST.:  2.1

 TOTAL DATA POINTS NORMALLY DISTRIBUTED (N):          344
 N*LOG(2PI) CONSTANT TO OBJECTIVE FUNCTION:    632.22971084481480
 OBJECTIVE FUNCTION VALUE WITHOUT CONSTANT:    123565049232.97618
 OBJECTIVE FUNCTION VALUE WITH CONSTANT:       123565049865.20589
 REPORTED OBJECTIVE FUNCTION DOES NOT CONTAIN CONSTANT

 TOTAL EFFECTIVE ETAS (NIND*NETA):                             0


 #TERE:
 Elapsed estimation  time in seconds:     0.57
 Elapsed postprocess time in seconds:     0.00

 ********************                                   FIRST ORDER                                  ********************
 #OBJT:**************                       MINIMUM VALUE OF OBJECTIVE FUNCTION                      ********************
 #OBJV:*********************************************************       **************************************************

 ********************                                   FIRST ORDER                                  ********************
 ********************                             FINAL PARAMETER ESTIMATE                           ********************

 THETA - VECTOR OF FIXED EFFECTS PARAMETERS   *********
         TH 1      TH 2      TH 3      TH 4      TH 5      TH 6      TH 7      TH 8      TH 9
         1.00E-04  1.64E+00  1.47E+02  3.30E+01  1.35E+03  1.01E+03  1.17E-01  2.52E-03  8.30E-02

 OMEGA - COV MATRIX FOR RANDOM EFFECTS - ETAS  ********
         ETA1      ETA2      ETA3      ETA4      ETA5      ETA6      ETA7
 ETA1
+        0.00E+00
 ETA2
+        0.00E+00  0.00E+00
 ETA3
+        0.00E+00  0.00E+00  0.00E+00
 ETA4
+        0.00E+00  0.00E+00  0.00E+00  0.00E+00
 ETA5
+        0.00E+00  0.00E+00  0.00E+00  0.00E+00  0.00E+00
 ETA6
+        0.00E+00  0.00E+00  0.00E+00  0.00E+00  0.00E+00  0.00E+00
 ETA7
+        0.00E+00  0.00E+00  0.00E+00  0.00E+00  0.00E+00  0.00E+00  0.00E+00

 SIGMA - COV MATRIX FOR RANDOM EFFECTS - EPSILONS  ****
         EPS1
 EPS1
+        1.00E+00

 OMEGA - CORR MATRIX FOR RANDOM EFFECTS - ETAS  *******
         ETA1      ETA2      ETA3      ETA4      ETA5      ETA6      ETA7
 ETA1
+        0.00E+00
 ETA2
+        0.00E+00  0.00E+00
 ETA3
+        0.00E+00  0.00E+00  0.00E+00
 ETA4
+        0.00E+00  0.00E+00  0.00E+00  0.00E+00
 ETA5
+        0.00E+00  0.00E+00  0.00E+00  0.00E+00  0.00E+00
 ETA6
+        0.00E+00  0.00E+00  0.00E+00  0.00E+00  0.00E+00  0.00E+00
 ETA7
+        0.00E+00  0.00E+00  0.00E+00  0.00E+00  0.00E+00  0.00E+00  0.00E+00

 SIGMA - CORR MATRIX FOR RANDOM EFFECTS - EPSILONS  ***
         EPS1
 EPS1
+        1.00E+00
 Elapsed finaloutput time in seconds:     0.16
 #CPUT: Total CPU Time in Seconds,        0.797
